*Heading
** Job name: vumat2 Model name: vumat2
** Generated by: Abaqus/CAE 6.14-2
*Preprint, echo=NO, model=NO, history=NO, contact=NO
**
** PARTS
**
*Part, name=brick
*Node
      1,  0.100000001,           0.,           0.
      2,  0.100000001,  0.100000001,           0.
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*Element, type=C3D8T
  1,  120,  121,  192,  186,  637,  638,  709,  703
  2,  214,  255,  256,  210,  731,  772,  773,  727
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*Nset, nset=brick_set, generate
    1,  1034,     1
*Elset, elset=brick_set, generate
   1,  471,    1
** Section: user_sec
*Solid Section, elset=brick_set, controls=EC-1, material=user_mat
,
*End Part
**
**
** ASSEMBLY
**
*Assembly, name=Assembly
**
*Instance, name=brick-1, part=brick
*End Instance
**
*Nset, nset=bottom_set, instance=brick-1
   1,   3,  29,  30,  31,  32
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*Elset, elset=bottom_set, instance=brick-1
   3,   4,   7,   9,  10,  29
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*Nset, nset=top_set, instance=brick-1
   2,   8,  72,  73,  74,  75
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*Elset, elset=top_set, instance=brick-1
   6,  55,  56,  62,  69,  70
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*End Assembly
**
** ELEMENT CONTROLS
**
*Section Controls, name=EC-1, DISTORTION CONTROL=YES, second order accuracy=YES
1., 1., 1.
**
** MATERIALS
**
*Material, name=user_mat
*Conductivity
51.,
*Density
7800.,
*Depvar, delete=10
     18,
*Inelastic Heat Fraction
         0.9,
*Specific Heat
470.,
*User Material, constants=27
 2.1e+11,      0.3,    7850., 3.75e+08,       1.,     0.35,     0.11,   0.1406
  0.00793,    1e-05,     480.,      0.9,     293.,     293.,    0.002,      1.5
       1.,     0.15,     0.25,      0.1,     0.04,      0.3,       1.,       0.
       0.,       0.,    0.002
** ----------------------------------------------------------------
**
** STEP: Step-1
**
*Step, name=Step-1, nlgeom=YES
*Dynamic, Explicit
, 0.005
*Bulk Viscosity
0.06, 1.2
**
** BOUNDARY CONDITIONS
**
** Name: fix_bc Type: Displacement/Rotation
*Boundary
bottom_set, 1, 1
bottom_set, 2, 2
bottom_set, 3, 3
** Name: velocity_bc Type: Velocity/Angular velocity
*Boundary, type=VELOCITY
top_set, 1, 1
top_set, 2, 2, 5.
top_set, 3, 3
**
** OUTPUT REQUESTS
**
*Restart, write, number interval=1, time marks=NO
**
** FIELD OUTPUT: F-Output-1
**
*Output, field, number interval=100
*Node Output
A, RF, U, V
*Element Output, directions=YES
EVF, LE, PE, PEEQ, PEEQVAVG, PEVAVG, S, SDV, STATUS, SVAVG, TEMP
*Contact Output
CSTRESS,
**
** HISTORY OUTPUT: H-Output-1
**
*Output, history, variable=PRESELECT
*End Step
